*MATERIAL, NAME=mid
*DENSITY
                 7.85E-9,
*ELASTIC, TYPE=ISOTROPIC
                 210000.,                      0.3
**
*SOLID SECTION, ELSET=pid, MATERIAL=mid
**
** MATERIALS
**
**
*INCLUDE, INPUT=example_runfiles/ex6_2ndorder.inp
**Default MATERIAL
**
**
*NODE
       1,                       0.,                       0.,                      10.
       2,                       0.,                      10.,                      20.
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**
** SOLID ELEMENTS
**
*ELEMENT, TYPE=C3D20, ELSET=pid
      43,       29,        4,        7,       40,       28,        8,        3,       39,       51,       26,       52,      101,       54,        2,        6,
      100,       98,       50,        1,      119
      44,       28,        8,        3,       39,       30,       10,        9,       41,       54,        2,        6,      100,       59,       55,       57,
      103,       99,       53,        5,      120
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**
**
**
**
**
**
**
** SECTION DATA
**
**
**
**
** BOUNDARY
**
**
** STEPS
**
**
** STEP 1
**
** *STEP, NAME=Anonymous STEP 1
*FREQUENCY, EIGENSOLVER=LANCZOS
      20,
**
** CLOAD
**
** *NODE PRINT
** U,
** *END STEP
** **
** ** STEP 2
** **
** *STEP, NAME=Anonymous STEP 2
** *MATRIX GENERATE, STIFFNESS, MASS
** *MATRIX OUTPUT, STIFFNESS, MASS, FORMAT=COORDINATE
** *END STEP
** *STEP
*STATIC
*BOUNDARY, TYPE=DISPLACEMENT
      29,        1,        3,                       0.
      40,        1,        3,                       0.
      51,        1,        3,                       0.
     101,        1,        3,                       0.
       4,        1,        3,                       0.
       7,        1,        3,                       0.
      26,        1,        3,                       0.
      52,        1,        3,                       0.
**
**
*CLOAD
      25,        2,                    -1000.
      27,        2,                    -1000.
      95,        2,                    -1000.
** *END STEP
